F-67A
# Trapezoidal Swept Wing, Flaps
# Thomas Sheridan, 11/8/2025

0.0                   ! Mach
0      0      0       ! iYsym  iZsym  Zsym
62.245 3.7325 18.2880  ! Sref Cref Bref
3.9237 0.0000 0.0000  ! Xref   Yref   Zref


SURFACE
Wing

# Nchord    Cspace    Nspan    Sspace
10 1.0 20 1.0

YDUPLICATE
0.0

COMPONENT
1

SECTION
# Xle  Yle    Zle    chord  angle
1.1700 1.7880 0.0000 4.5197 -0.5279

AFILE
C:\Users\tsher\OneDrive\Documents\AE481\NoThaiGrubbin-Repo\Aero\PlanformTrade1\opt_5pt_3mm_newcl.dat

SECTION
# Xle  Yle    Zle    chord  angle
1.5960 2.4384 0.0000 4.2589 -0.7200

CONTROL
# surface gain   xhinge     hvec     SgnDup
LE_Flap   1.0    -0.1023    0 -1 0   1

CONTROL
# surface gain   xhinge     hvec     SgnDup
TE_Flap   1.0    0.8019     0 1 0    1

AFILE
C:\Users\tsher\OneDrive\Documents\AE481\NoThaiGrubbin-Repo\Aero\PlanformTrade1\opt_5pt_3mm_newcl.dat

SECTION
# Xle  Yle    Zle    chord  angle
3.3750 5.1562 0.0000 3.1694 -1.5220

CONTROL
# surface gain   xhinge     hvec     SgnDup
LE_Flap   1.0    -0.1380    0 -1 0   1

CONTROL
# surface gain   xhinge     hvec     SgnDup
TE_Flap   1.0    0.7338     0 1 0    1

CONTROL
# surface gain   xhinge     hvec     SgnDup
Flaperon  1.0    0.74       0 1 0    1

AFILE
C:\Users\tsher\OneDrive\Documents\AE481\NoThaiGrubbin-Repo\Aero\PlanformTrade1\opt_5pt_3mm_newcl.dat

SECTION
# Xle  Yle    Zle    chord  angle
5.6857 8.6868 0.0000 1.7542 -2.5650

CONTROL
# surface gain   xhinge     hvec     SgnDup
LE_Flap   1.0    -0.2493    0 -1 0   1

CONTROL
# surface gain   xhinge     hvec     SgnDup
Flaperon  1.0    0.74       0 1 0    1

AFILE
C:\Users\tsher\OneDrive\Documents\AE481\NoThaiGrubbin-Repo\Aero\PlanformTrade1\opt_5pt_3mm_newcl.dat

SECTION
# Xle  Yle    Zle    chord  angle
5.9850 9.1440 0.0000 1.5709 -2.7000

AFILE
C:\Users\tsher\OneDrive\Documents\AE481\NoThaiGrubbin-Repo\Aero\PlanformTrade1\opt_5pt_3mm_newcl.dat


SURFACE
Top Plane Cruciform

# Nchord    Cspace    Nspan    Sspace
20 1.0 20 1.0

YDUPLICATE
0.0

COMPONENT
1

SECTION
# Xle   Yle    Zle    chord  angle
-5.3762 0.0000 0.0000 13.360 0.0000

SECTION
# Xle   Yle    Zle    chord  angle
-0.5756 1.0752 0.0000 8.5598 0.0000

SECTION
# Xle   Yle    Zle    chord  angle
-1.3028 1.7878 0.0000 9.2870 0.0000


SURFACE
Horizontal Stabilizer

# Nchord    Cspace    Nspan    Sspace
10 1.0 20 1.0

YDUPLICATE
0.0

COMPONENT
2

SECTION
# Xle  Yle    Zle    chord  angle
6.0931 1.6307 -0.100 3.7991 0.0000

CONTROL
# surface   gain   xhinge   hvec     SgnDup
Elevator    1.0    0.0      0 1 0    1

SECTION
# Xle  Yle    Zle    chord  angle
9.0038 5.3348 -0.100 1.1397 0.0000

CONTROL
# surface   gain   xhinge   hvec     SgnDup
Elevator    1.0    0.0      0 1 0    1


SURFACE
Vertical Stabilizer

# Nchord    Cspace    Nspan    Sspace
10 1.0 20 1.0

YDUPLICATE
0.0

COMPONENT
3

SECTION
# Xle  Yle    Zle    chord  angle
5.1601 0.9652 0.0000 4.4479 0.0000

SECTION
# Xle  Yle    Zle    chord  angle
7.8006 2.1061 3.1347 2.2239 0.0000


SURFACE
Right Plane Cruciform

# Nchord    Cspace    Nspan    Sspace
20 1.0 10 1.0

COMPONENT
4

SECTION
# Xle   Yle    Zle     chord  angle
-3.8652 0.0000 -0.6033 11.849 0.0000

SECTION
# Xle   Yle    Zle    chord  angle
-5.3762 0.0000 0.0000 13.360 0.0000

SECTION
# Xle   Yle    Zle    chord  angle
-3.8652 0.0000 0.6033 11.849 0.0000

SECTION
# Xle   Yle    Zle    chord  angle
-2.2647 0.0000 1.2929 5.6134 0.0000

NOWAKE
