F-67D
# Wing with LE flap, inboard TE flap, and outboard flaperon. H-Tail with elevator. V-Tail. Top cruciform.
# Thomas Sheridan, 11/14/2025

0.84                  ! Mach
0      0      0       ! iYsym  iZsym  Zsym
60.1607 4.6486 14.8590  ! Sref Cref Bref
8.7873 0.0000 0.0000  ! Xref Yref Zref

SURFACE
Wing

# Nchord    Cspace    Nspan    Sspace
10 1.0 20 1.0

YDUPLICATE
0.0

COMPONENT
1

SECTION
# Xle  Yle    Zle    chord  angle
6.1944 2.0066 0.0000 5.2899 0.0000

CONTROL
# surface gain   xhinge     hvec     SgnDup
LE_Flap   1.0    -0.1023    0 -1 0   1

CONTROL
# surface gain   xhinge     hvec     SgnDup
TE_Flap   1.0    0.8019     0 1 0    1

AFILE
C:\Users\james\OneDrive - Umich\Desktop\AERO 481\Github481\NoThaiGrubbin-Repo\Aero\PlanformTrade2\opt_5pt_3mm_newcl.dat

CDCL
-0.2604 0.0124 -0.0131 0.0065 0.6454 0.0136

SECTION
# Xle  Yle    Zle    chord  angle
8.7199 5.3340 0.0000 2.8722 -1.6567

CONTROL
# surface gain   xhinge     hvec     SgnDup
LE_Flap   1.0    -0.1380    0 -1 0   1

CONTROL
# surface gain   xhinge     hvec     SgnDup
TE_Flap   1.0    0.7338     0 1 0    1

CONTROL
# surface gain   xhinge     hvec     SgnDup
Flaperon  1.0    0.74       0 1 0    1

AFILE
C:\Users\james\OneDrive - Umich\Desktop\AERO 481\Github481\NoThaiGrubbin-Repo\Aero\PlanformTrade2\opt_5pt_3mm_newcl.dat

CDCL
-0.2651 0.0130 -0.0131 0.0070 0.6199 0.0133

SECTION
# Xle  Yle    Zle    chord  angle
10.0284 7.0580 0.0000 1.6195 -2.5150

CONTROL
# surface gain   xhinge     hvec     SgnDup
LE_Flap   1.0    -0.2493    0 -1 0   1

CONTROL
# surface gain   xhinge     hvec     SgnDup
Flaperon  1.0    0.74       0 1 0    1

AFILE
C:\Users\james\OneDrive - Umich\Desktop\AERO 481\Github481\NoThaiGrubbin-Repo\Aero\PlanformTrade2\opt_5pt_3mm_newcl.dat

CDCL
-0.2694 0.0135 -0.0131 0.0075 0.6067 0.0131

SECTION
# Xle  Yle    Zle    chord  angle
10.3104 7.4295 0.0000 1.3496 -2.7000

AFILE
C:\Users\james\OneDrive - Umich\Desktop\AERO 481\Github481\NoThaiGrubbin-Repo\Aero\PlanformTrade2\opt_5pt_3mm_newcl.dat

CDCL
-0.2708 0.0137 -0.0131 0.0077 0.6039 0.0130

SURFACE
Top Plane Cruciform

# Nchord    Cspace    Nspan    Sspace
20 1.0 10 1.0

YDUPLICATE
0.0

COMPONENT
1

SECTION
# Xle  Yle    Zle    chord  angle
0.0000 0.0000 0.0000 12.954 0.0000

SECTION
# Xle  Yle    Zle    chord  angle
4.9276 0.9754 0.0000 8.0263 0.0000

SECTION
# Xle  Yle    Zle    chord  angle
4.0716 2.0066 0.0000 10.922 0.0000

SURFACE
Horizontal Stabilizer

# Nchord    Cspace    Nspan    Sspace
10 1.0 20 1.0

YDUPLICATE
0.0

COMPONENT
2

SECTION
# Xle  Yle    Zle    chord  angle
11.6362 2.0066 -0.1000 3.7532 0.0000

CONTROL
# surface   gain   xhinge   hvec     SgnDup
Elevator    1.0    0.0      0 1 0    1

SECTION
# Xle  Yle    Zle    chord  angle
14.9517 5.6660 -0.1000 1.1260 0.0000

CONTROL
# surface   gain   xhinge   hvec     SgnDup
Elevator    1.0    0.0      0 1 0    1

SURFACE
Vertical Stabilizer

# Nchord    Cspace    Nspan    Sspace
10 1.0 20 1.0

YDUPLICATE
0.0

COMPONENT
3

SECTION
# Xle  Yle    Zle    chord  angle
8.8658 0.9652 0.0000 4.4068 0.0000

SECTION
# Xle  Yle    Zle    chord  angle
11.9073 2.0956 3.1058 2.2034 0.0000
