OpenVSP model (file version 5), 6 components.
Geometry view with OpenVSP parameter names; values to 6 digits, angles in degrees, lengths in the model's unit.
Overall bounding box: X_Min=0 X_Len=51.2818 Y_Min=-15.6822 Y_Len=31.3645 Z_Min=-3.33735 Z_Len=14.594

Fuselage "FuselageGeom"
  location (X Y Z) 0 0 0, rotation 0 0 0
  bounding box size 49.58 11.1856 7.50613
  Design: Length=49.58
  cross sections:
    n   XLocPercent  YLocPercent  ZLocPercent  shape
    0   0            0            -0.0194672   point
    1   0.0327869    0            -0.0184426   circle Circle_Diameter=0.266864
    2   0.144484     0            -0.00204918  super ellipse Super_Height=2.6 Super_M=2 Super_MaxWidthLoc=0.142857 Super_N=2 Super_Width=3.36735
    3   0.189153     0            0.00307377   super ellipse Super_Height=2.91837 Super_M=2 Super_MaxWidthLoc=0.142857 Super_N=2 Super_Width=3.76468
    4   0.223632     0            0.0163934    general fuselage BotStr=0.83 BotTanAngle=91.9286 CornerRad=0 Height=3.87347 LowStr=0.83 MaxWidthLoc=-0.242857 TopStr=0.83 TopTanAngle=44.3571 UpStr=0.83 Width=4.60695
    5   0.27972      0            0.0286885    general fuselage BotStr=0.83 BotTanAngle=90 CornerRad=0.0535714 Height=4.86987 LowStr=0.83 MaxWidthLoc=-0.257143 TopStr=0.999964 TopTanAngle=42.4286 UpStr=1.54243 Width=5.18696
    6   0.317419     0            0.0102459    general fuselage BotStr=1.50321 BotTanAngle=75.8571 CornerRad=0.05 Height=6.97974 LowStr=0.83 MaxWidthLoc=0 TopStr=0.83 TopTanAngle=52.7143 UpStr=1.53589 Width=5.66392
    7   0.335808     0            0.00819672   general fuselage BotStr=0.83 BotTanAngle=75.8571 CornerRad=0.0285714 Height=7.05714 LowStr=1.33982 MaxWidthLoc=-0.0714286 TopStr=0.83 TopTanAngle=41.7857 UpStr=0.83 Width=5.84278
    8   0.458392     0            -0.00307377  general fuselage BotStr=0.83 BotTanAngle=75.8571 CornerRad=0.0285714 Height=6.19627 LowStr=1.33982 MaxWidthLoc=-0.0714286 TopStr=0.83 TopTanAngle=41.7857 UpStr=0.83 Width=8.98835
    9   0.683603     0            -0.00307377  general fuselage BotStr=1.25396 BotTanAngle=6.42857 CornerRad=0 Height=5.46531 LowStr=2.46754 MaxWidthLoc=0.135714 TopStr=0.647036 TopTanAngle=9 UpStr=1.75811 Width=9.95288
    10  0.896263     0            0            general fuselage BotStr=1.13721 BotTanAngle=36.6429 CornerRad=0.0178571 Height=4.66939 LowStr=1.36596 MaxWidthLoc=0.135714 TopStr=0.83 TopTanAngle=16.7143 UpStr=0.83 Width=7.56979
    11  1            0            0            circle Circle_Diameter=2.8626

Blank "BlankGeom"
  location (X Y Z) 3.15217 3.36957 0, rotation 0 0 0

Wing "H-Stab", child of "BlankGeom"
  location (X Y Z) 41.144 3.36957 0, rotation 0 0 0; relative location 37.9918 0 0, rotation 0 0 0
  symmetric about XZ
  bounding box size 8.43254 19.294 0.978826
  totals: TotalSpan=12.6492 TotalProjectedSpan=12.5549 TotalChord=4.47969 TotalArea=70.029 TotalAR=2.25086 MAC=6.08656
  root: chord 8.43254, twist 0, wedge DuLow=0.1 DuUp=0.1 FlatLow=0 FlatUp=0 SymmThick=1 ThickChord=0.04 ThickLoc=0.5 ThickLocLow=0.5 UForeLow=0.25 UForeUp=0.75 ZCamber=0
  sections:
    n  Span     Root_Chord  Tip_Chord  Area     Sweep    Sweep_Location  Dihedral  Twist  Twist_Location  tip airfoil
    1  5.22978  8.43254     3.75892    31.8793  41.7857  0               -7        0      0.25            as above
    2  1.09481  3.75892     1.96838    3.13516  41.7857  0               -7        0      0.25            as above

Wing "MainWing"
  location (X Y Z) 20.2459 0 0, rotation 0 0 0
  symmetric about XZ
  bounding box size 16.7503 31.3645 0.684148
  totals: TotalSpan=31.3651 TotalProjectedSpan=31.3645 TotalChord=10.3597 TotalArea=324.933 TotalAR=3.02749 MAC=11.6725
  root: chord 16.75, twist 0, NACA 64-series A=0.8 IdealCl=0.2 ThickChord=0.04
  sections:
    n  Span     Root_Chord  Tip_Chord  Area     Sweep    Sweep_Location  Dihedral  Twist  Twist_Location  tip airfoil
    1  15.6825  16.75       3.9694     162.466  39.1786  0               0.357143  -3     0.25            as above

Wing "V-Stab"
  location (X Y Z) 31.7213 0 2.45902, rotation 90 0 0
  bounding box size 19.5605 0.635024 8.79762
  totals: TotalSpan=8.79762 TotalProjectedSpan=8.79762 TotalChord=9.27001 TotalArea=64.6677 TotalAR=1.19686 MAC=8.29037
  root: chord 15.873, twist 0, wedge DuLow=0.1 DuUp=0.1 FlatLow=0 FlatUp=0 SymmThick=1 ThickChord=0.04 ThickLoc=0.5 ThickLocLow=0.5 UForeLow=0.25 UForeUp=0.75 ZCamber=0
  sections:
    n  Span     Root_Chord  Tip_Chord  Area     Sweep    Sweep_Location  Dihedral  Twist  Twist_Location  tip airfoil
    1  1.50794  15.873      8.50828    18.3827  78.4286  0               0         0      0.25            as above
    2  7.28968  8.50828     4.19048    46.2849  47.6786  0               0         0      0.25            as above

Mesh "MeshGeom"
  location (X Y Z) 0 0 0, rotation 0 0 0
  bounding box size 51.2818 31.3645 14.5344
  triangle mesh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
