OpenVSP model (file version 5), 6 components.
Geometry view with OpenVSP parameter names; values to 6 digits, angles in degrees, lengths in the model's unit.
Overall bounding box: X_Min=0 X_Len=16.9844 Y_Min=-6.26995 Y_Len=12.5399 Z_Min=-0.7226 Z_Len=4.16276

Wing "Wing"
  location (X Y Z) 5.8 0 0.400407, rotation 0 0 0
  symmetric about XZ
  bounding box size 9.00026 12.5399 0.54166
  totals: TotalSpan=12.5399 TotalProjectedSpan=12.5399 TotalChord=3.75 TotalArea=65.1765 TotalAR=2.41267 MAC=6.15281
  root: chord 9, twist 0, NACA 65-series A=1 IdealCl=0.2 ThickChord=0.06
  sections:
    n  Span      Root_Chord  Tip_Chord  Area     Sweep    Sweep_Location  Dihedral  Twist  Twist_Location  tip airfoil
    1  5.40396   9           2.5        31.0728  41.9435  0               0         0      0.25            as above
    2  0.865989  2.5         1          1.51548  40       0               0         0      0.25            as above
  structure "Wing_Struct2": Skin

Wing "HTail"
  location (X Y Z) 12.7895 1.09674 0.243902, rotation 0 0 0
  symmetric about XZ
  bounding box size 4.1949 8.09111 0.142353
  totals: TotalSpan=5.89764 TotalProjectedSpan=5.89764 TotalChord=2.41258 TotalArea=14.4545 TotalAR=2.40632 MAC=2.57122
  root: chord 2.83465, twist 0, biconvex ThickChord=0.05
  sections:
    n  Span     Root_Chord  Tip_Chord  Area     Sweep  Sweep_Location  Dihedral  Twist  Twist_Location  tip airfoil
    1  1.6063   2.83465     2.84706    4.56326  40     0               0         0      0.25            as above
    2  1.34252  2.84706     1.12157    2.66398  44     0               0         0      0.25            as above

Wing "VTail"
  location (X Y Z) 11.332 1.25506 0.487805, rotation 0 0 0
  symmetric about XZ
  bounding box size 4.48819 5.95407 3.01967
  totals: TotalSpan=6.7833 TotalProjectedSpan=3.39165 TotalChord=2.84802 TotalArea=19.3189 TotalAR=0.595441 MAC=3.16287
  root: chord 4.48819, twist 0, biconvex ThickChord=0.06
  sections:
    n  Span     Root_Chord  Tip_Chord  Area     Sweep    Sweep_Location  Dihedral  Twist  Twist_Location  tip airfoil
    1  3.39165  4.48819     1.20784    9.65947  25.1237  0               60        0      0.25            biconvex ThickChord=0.05

Fuselage "FuselageGeom"
  location (X Y Z) 0 0 0, rotation 0 0 0
  bounding box size 15.24 4.07388 2.31696
  Design: Length=15.24
  cross sections:
    n  XLocPercent  YLocPercent  ZLocPercent  shape
    0  0            0            0            point
    1  0.111076     0            0.003        ellipse Ellipse_Height=1.00997 Ellipse_Width=1.29079
    2  0.191298     0            0.01         ellipse Ellipse_Height=1.51762 Ellipse_Width=1.6
    3  0.281633     0            0.03         ellipse Ellipse_Height=2.25 Ellipse_Width=1.67661
    4  0.332334     0            0.03         ellipse Ellipse_Height=2.15 Ellipse_Width=3.4922
    5  0.504116     0            0.01         ellipse Ellipse_Height=1.75 Ellipse_Width=4.07388
    6  0.75         0            0.01         as above
    7  1            0            0.015        ellipse Ellipse_Height=1.25 Ellipse_Width=4.07388

Mesh "MeshGeom"
  location (X Y Z) 0 0 0, rotation 0 0 0

Human "HumanGeom"
  location (X Y Z) 4.34783 0 0.543478, rotation 0 0 0
  bounding box size 0.687939 0.63995 1.43845
  mass: Density=1097.24 Shell_Flag=0 Mass_Area=1 Mass_Prior=0
  Anthropometric: Age=30 AutoDensity=1 BMI=27.7 BMI_pct=0.5 GenderFlag=0 LenUnit=2 Mass=85.4139 MassUnit=1 SitFrac=0.51 Stature=1.756 Stature_pct=0.5 Volume=0.0778443

VSPAERO settings (reference component "Wing"): Sref=65.1765 bref=12.5399 cref=6.15281 Xcg=0 Ycg=0 Zcg=0 AlphaStart=0 AlphaEnd=5 AlphaNpts=6 BetaStart=0 BetaEnd=0 BetaNpts=1 MachStart=2 MachEnd=0 MachNpts=1 ReCref=1e+07 Vinf=100 Rho=0.002377
